# OpenSim document version 40500
InverseKinematicsTool SUBJ01_NormalWalking_06_markers:
  results_directory: C:\Users\medenaye\Documents\programs\GitHub\Data-Processing-Public\SUBJ01\IK
  model_file: C:\Users\medenaye\Documents\projects\[00] FWO\WP1\T1.1\OpenSim\analysis\SUBJ01\scaling\SUBJ01v2.osim
  time_range: -Inf Inf
  output_motion_file: C:\Users\medenaye\Documents\programs\GitHub\Data-Processing-Public\SUBJ01\IK\SUBJ01_NormalWalking_06_markers_ik.mot
  report_errors: true
  marker_file: C:\Users\medenaye\Documents\projects\[00] FWO\WP1\T1.1\data\SUBJ01\processed-data\SUBJ01_NormalWalking_06_markers.trc
  report_marker_locations: false
  IKTaskSet:
    IKMarkerTask RSHO: apply=true weight=2
    IKMarkerTask LSHO: apply=true weight=2
    IKMarkerTask C7: apply=true weight=1
    IKMarkerTask CLAV: apply=true weight=1
    IKMarkerTask RUPA: apply=true weight=1
    IKMarkerTask RUPA2: apply=true weight=1
    IKMarkerTask RELB: apply=true weight=1
    IKMarkerTask RELBmed: apply=false weight=1
    IKMarkerTask RFRM: apply=true weight=1
    IKMarkerTask RWRA: apply=true weight=1
    IKMarkerTask RWRB: apply=true weight=1
    IKMarkerTask LUPA: apply=true weight=1
    IKMarkerTask LUPA2: apply=true weight=1
    IKMarkerTask LELB: apply=true weight=1
    IKMarkerTask LELBmed: apply=false weight=1
    IKMarkerTask LFRM: apply=true weight=1
    IKMarkerTask LWRA: apply=true weight=1
    IKMarkerTask LWRB: apply=false weight=1
    IKMarkerTask RASI: apply=true weight=4
    IKMarkerTask LASI: apply=true weight=4
    IKMarkerTask RPSI: apply=true weight=1
    IKMarkerTask LPSI: apply=true weight=1
    IKMarkerTask RTHI3: apply=true weight=4
    IKMarkerTask RTHI2: apply=true weight=4
    IKMarkerTask RTHI: apply=true weight=4
    IKMarkerTask RKNE: apply=false weight=4
    IKMarkerTask RKNEmed: apply=false weight=1
    IKMarkerTask RTIB3: apply=true weight=4
    IKMarkerTask RTIB2: apply=true weight=4
    IKMarkerTask RTIB: apply=true weight=4
    IKMarkerTask RANK: apply=true weight=4
    IKMarkerTask RANKmed: apply=true weight=1
    IKMarkerTask RHEE: apply=true weight=4
    IKMarkerTask RTOE: apply=true weight=4
    IKMarkerTask RMT5: apply=true weight=4
    IKMarkerTask LTHI3: apply=true weight=4
    IKMarkerTask LTHI2: apply=true weight=4
    IKMarkerTask LTHI: apply=true weight=4
    IKMarkerTask LKNE: apply=false weight=4
    IKMarkerTask LKNEmed: apply=false weight=1
    IKMarkerTask LTIB3: apply=true weight=4
    IKMarkerTask LTIB2: apply=true weight=4
    IKMarkerTask LTIB: apply=true weight=4
    IKMarkerTask LANK: apply=true weight=4
    IKMarkerTask LANKmed: apply=true weight=1
    IKMarkerTask LHEE: apply=true weight=4
    IKMarkerTask LTOE: apply=true weight=4
    IKMarkerTask LMT5: apply=true weight=4
    IKMarkerTask LFHD: apply=false weight=1
    IKMarkerTask RFHD: apply=false weight=1
    IKMarkerTask RBHD: apply=false weight=1
    IKMarkerTask LBHD: apply=false weight=1
    IKMarkerTask STRN: apply=true weight=1
    IKMarkerTask SACR: apply=false weight=1
    IKMarkerTask T10: apply=true weight=1
    IKMarkerTask RFIN: apply=true weight=1
    IKMarkerTask LFIN: apply=true weight=1
    IKMarkerTask RBAK: apply=true weight=1
